** SERVICE LOADING OF THE PART **
*STEP,NAME = SERVICE, INC= 20000, NLGEOM = YES
*COUPLED TEMPERATURE-DISPLACEMENT,DELTMX = 10., CETOL= 1e-3
0, 0.3000000000000007, 1e-9,0.3000000000000007
**SOLUTION TECHNIQUE, TYPE = SEPARATED
*BOUNDARY, OP = NEW
1, 1, 1
1, 2, 2
1, 3, 3
2, 1, 1
2, 2, 2
2, 3, 3
8, 1, 1
8, 2, 2
8, 3, 3
ALLNODES, 11, 11, 20
*SFILM, OP = NEW
*RESTART, WRITE, FREQUENCY = 0
*OUTPUT, FIELD, VARIABLE = PRESELECT
*OUTPUT, HISTORY, VARIABLE = PRESELECT
*NODE OUTPUT, NSET = N2
U
*END STEP
